d := 0.1175
φ1 := π/2
ψ1 := 140*π/180
ψ2 := π
φ2 := 3*π/4
ψ3 := 200*π/180
φ3 := π
Eq(P1, P2, P3) := [
    P1*cos(ψ1) - P2*cos(φ1) + P3 - cos(φ1 - ψ1);
    P1*cos(ψ2) - P2*cos(φ2) + P3 - cos(φ2 - ψ2);
    P1*cos(ψ3) - P2*cos(φ3) + P3 - cos(φ3 - ψ3)
]
abc := Eq(P1, P2, P3) solve, P1, P2, P3 → [-(cos(π/9) - cos(5/18*π) + sqrt(2)*(cos(5*π/18) - 1) + sqrt(2) - 1)/(cos(π/9) - cos(2/9*π) + sqrt(2)*(cos(2*π/9) - 1)), (4*cos(2*π/9) - 4*cos(π/9) + 2*sqrt(2)*cos(π/9) - 4*sqrt(2)*cos(5*π/18) + 2*sqrt(2)*cos(7*π/18) - sqrt(2) + sqrt(6))/(8*sqrt(2)*sin(π/9)^2 - 8*sin(π/9)^2 + 8*sin(π/18)^2), (cos(2*π/9) - cos(π/9)*cos(2*π/9) + cos(π/9)*cos(5*π/18) - sqrt(2)*cos(5*π/18))/(cos(π/9) - cos(2/9*π) + sqrt(2)*cos(2*π/9) - sqrt(2))]
a := d/|abc[:, 0]| = 0.089698
cc := d/|abc[:, 1]| = 0.224076
b := sqrt(a^2 + cc^2 + d^2 - 2*a*cc*|abc[:, 2]|) = 0.0767123
a := 0.04
b := 0.118
cc := 0.12
P1 := d/a = 2.9375
P2 := d/cc = 0.979167
P3 := (a^2 - b^2 + cc^2 + d^2)/(2*a*cc) = 1.6544
A(φ) := P1 - P2*cos(φ) + P3 - cos(φ)
B(φ) := sin(φ)
C(φ) := (-P1 + P2*cos(φ) + (-P3))
ψ(φ) := π + 2*atan((B(φ) - sqrt(A(φ)^2 - C(φ)^2 + B(φ)^2))/(2*A(φ)))
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